// COMSOL Multiphysics 6.2.0.658 model "Simulation.mph"
// Outline of the model tree

Parameters
  lambda1 = 532[nm]  // Bølgelængde
  n = 3.5  // Brydningsindeks for Si
  k0 = 2*pi/lambda1  // Bølgetallet i vakuum
  theta = 30[deg]  // Vinklen mellem objektets lys og referencen
  domain_w = 5[um]  // Bredde af min krystal
  domain_h = 2[um]  // Højden af min krystal
  PortName = 1

Selections
  sel1: Explicit on no boundaries
  sel2: Explicit on no boundaries
  sel3: Explicit on boundaries 1
  sel4: Explicit on boundaries 4

Geometry
  geom1 "Geometry 1" (2D, length unit m)
    r1: Rectangle | layername = Layer 1; layer = 0.10; size = {domain_w, domain_h}
    fin: Finalize "Form Union"

Materials
  mat1: Common "Sillicium"
    RefractiveIndex
      n = n
      ki = 0

Physics
  ewfd: ElectromagneticWavesFrequencyDomain on all domains
    dependent variable E = {Ex, Ey, Ez}
    MeshControl.SizeControlParameter = UserDefined
    MeshControl.PhysicsControlledMeshMaximumElementSize = lambda1 / ( 10 * n )
    wee1: WaveEquationElectric (default)
    pec1: PerfectElectricConductor (default)
    init1: init "Initial Values 1" (default)

Mesh
  mesh1 "Mesh 1" (physics-controlled)
    size: MeshSizeDefault | hauto = 3

Studies
  std1 "Study 1"
    fdss: FrequencyDomainSourceSweep | punit = THz; plist = c_const/lambda0

Solver configurations
  sol1 "Solution 1" (study std1)

Datasets
  dset1: Solution | solution = sol1

Plots
  pg1: PlotGroup2D "2D Plot Group 1"
    surf1: Surface | expr = comp1.ewfd.normE^2
  pg2: PlotGroup2D "Electric Field (ewfd)" | data = dset1
    surf1: Surface | expr = ewfd.normE