8.3
(a)
v_1 := 100 ∠ -45°
v_2 := 100 ∠ 75°
v_3 := 100 ∠ 195°
v := v_1 + v_2 + v_3 = 3.55271e-15i
8.5
(a)
v_1(t) := 220*cos(314.2*t - 45°) V
v_2(t) := 110*cos(377*t + 45°) V
I_1(t) := 30*cos(314.2*t - 26.6°) mA
I_2(t) := 50*cos(377*t - 145°) mA
8.9
ω := k
i_1 := 250 ∠ -60°
i_2 := 750 ∠ -90°
i_3 := i_2 - i_1 = -125 - 533.494i
i_3(t) := 547.942*cos(ω*t - 103.187°)
8.11
i(t) := 4*cos(ω*t + 90°)
I := 4 ∠ 90°
V := 9.84 + 1.74j
Z := V/I = 0.435 - 2.46i
8.14
ω := 5*1000
R := 20
C := 100*10^-6
i := sqrt(-1)
L := 20*10^-3
Z_eq1 := 1/(1/R + (ω*C)*i) = 0.19802 - 1.9802i
Z := 10 + i*ω*L + Z_eq1 = 10.198 + 98.0198i
R_eq := 10.198
L_eq := 98.02i/(i*ω) = 0.019604
8.17
ω := 100
(a)
# Resistoren er uændret. De andres afhænger af frekvensen. Kondensatornes impedens er proportional til 1/omega. Så kondensatornes impedans bliver 100 gange så stor. Spolens bliver så 100 gange mindre.
(b)
Z_eq := 1/(1/(600 + 900j) + 1/(-300j)) + 600j = 75 + 225i
(c)
R_eq := 75 Ω
L_eq := 225i/(ω*i) = 2.25
8.25
v_s := 50 ∠ 0°
Z_R := 50
Z_L := 25*10^-3*5000j
Z_eq := Z_R + Z_L = 50 + 125i
I := v_s/Z_eq = 0.137931 - 0.344828i
V_R := I*Z_R = 6.89655 - 17.2414i
V_L := I*Z_L = 43.1034 + 17.2414i
x := [0.137931; 6.897; 43.103]
y := [-0.344828; -17.241; 17.241]
# [plot: y vs x]
# Strømmen er bagefter
8.33
I_s := 3
ω := 2500
C := 0.2*10^-6
Z_eq1 := 2000 + 1/(ω*C*i) = 2000 - 2000i
I_x := I_s*Z_eq1/(1000 + Z_eq1) = 2.30769 - 0.461538i
V_x := (I_s - I_x)*2000 = 1384.62 + 923.077i
i_x(t) := 2.353*cos(ω*t - 11.31°) A
v_x(t) := 1.664*cos(ω*t + 33.69°) kV
