// COMSOL Multiphysics 6.2.0.658 model "Bølgeudbreddelse.mph"
// Outline of the model tree

Parameters
  lamb = 1550[nm]
  n_core = 1.45
  n_cladding = 1.4
  width = 0.5[um]
  length = 5[um]

Geometry
  geom1 "Geometry 1" (2D, length unit µm)
    r1: Rectangle | size = {5, 1.5}
    r2: Rectangle | pos = {0, 0.4}; size = {5, 0.5}
    fin: Finalize "Form Union"

Materials
  mat1: Common "Core" on domains 2
    RefractiveIndex
      n = n_core
      ki = 0
  mat2: Common "Cladding" on domains 1, 3
    RefractiveIndex
      n = n_cladding
      ki = 0
  mat3: Common "Silica glass" (disabled) on domains 2
    def "Basic"
      relpermeability = 1
      electricconductivity = 1e-14[S/m]
      thermalexpansioncoefficient = 0.55e-6[1/K]
      heatcapacity = 703[J/(kg*K)]
      relpermittivity = 3.75
      density = 2203[kg/m^3]
      thermalconductivity = 1.38[W/(m*K)]
    Enu "Young's modulus and Poisson's ratio"
      E = 73.1[GPa]
      nu = 0.17
    RefractiveIndex
      n = 1.45
      ki = 0

Physics
  ewfd: ElectromagneticWavesFrequencyDomain on all domains
    dependent variable E = {Ex, Ey, Ez}
    MeshControl.SizeControlParameter = UserDefined
    MeshControl.PhysicsControlledMeshMaximumElementSize = lamb/(10 * n_core)
    EquationForm.form = Automatic
    EquationForm.modeFreq = root.c_const/lamb
    wee1: WaveEquationElectric (default)
    pec1: PerfectElectricConductor (default)
    init1: init "Initial Values 1" (default)
    port1: Port on boundaries 1, 3, 5 | PortType = Rectangular; beta = 0; PortModeType = TE
    port2: Port on boundaries 8-10 | PortType = Rectangular; PortModeNumber = 1; beta = 0; PortModeType = TE

Mesh
  mesh1 "Mesh 1" (physics-controlled)
    size: MeshSizeDefault | hauto = 1

Studies
  std2 "Study 2"
    bma: BoundaryModeAnalysis
      transform = effective_mode_index
      modeFreq = c_const/lamb
      shift = 1
      conrad = 1
      conradynhm = 1
      linpsolnum = auto
    freq: Frequency "Frequency Domain" | punit = Hz; plist = c_const/lamb; preusesol = yes

Solver configurations
  sol1 "Solution 1" (study std2)
    v1: Variables "Dependent Variables 1"
    e1: Eigenvalue "Eigenvalue Solver 1"
      dDef: Direct
    su1: StoreSolution "Solution Store 1"
    v2: Variables "Dependent Variables 2" | initmethod = sol; notsolmethod = sol
    s1: Stationary "Stationary Solver 1" | stol = 0.01; linpmethod = sol
      p1: Parametric | pname = freq; plistarr = c_const/lamb; punit = Hz; pcontinuationmode = no
      fc1: FullyCoupled | linsolver = d1
      d1: Direct "Suggested Direct Solver (ewfd)"
  sol2 "Solution Store 1" (study std2)

Datasets
  dset1: Solution | solution = sol1
  dset2: Solution | solution = sol2

Derived values
  gev1: EvalGlobal "Reflectance, Transmittance, and Absorptance (ewfd)"
    data = dset1
    table = tbl1
    expr = {ewfd.Rport_1, ewfd.Rtotal, ewfd.Tport_2, ewfd.Ttotal, ewfd.RTtotal, ewfd.Atotal}

Tables
  tbl1: Table
    freq (Hz) | Reflectance, port 1 (1) | Total reflectance (1) | Transmittance, port 2 (1) | Total transmittance (1) | Total reflectance and transmittance (1) | Absorptance (1) | Reflectance, port 1 (1) | Total reflectance (1) | Transmittance, port 2 (1) | Total transmittance (1) | Total reflectance and transmittance (1)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
    1.93414e+14 | 3.44118e-09 | 3.44118e-09 | 1 | 1 | 1 | 2.9976e-15 | 3.44118e-09 | 3.44118e-09 | 1 | 1 | 1

Plots
  pg1: PlotGroup2D "Electric Field (ewfd)" | data = dset1
    surf1: Surface | expr = ewfd.normE