// COMSOL Multiphysics 6.2.0.658 model "Simulation.mph.mph"
// Outline of the model tree

Parameters
  lambda1 = 532[nm]  // Bølgelængde
  n = 3.5  // Brydningsindeks for Si
  k0 = 2*pi/lambda1  // Bølgetallet i vakuum
  theta = 30[deg]  // Vinklen mellem objektets lys og referencen
  domain_w = 5[um]  // Bredde af min krystal
  domain_h = 2[um]  // Højden af min krystal
  PortName = 1
  f1 = c_const/lambda1  // Frekvensen svarende til bølgelængden

Selections
  sel1: Explicit on no boundaries
  sel2: Explicit on no boundaries
  sel3: Explicit on boundaries 1
  sel4: Explicit on boundaries 4

Geometry
  geom1 "Geometry 1" (2D, length unit m)
    r1: Rectangle | size = {domain_w, domain_h}
    fin: Finalize "Form Union"

Materials
  mat1: Common "Sillicium"
    RefractiveIndex
      n = n
      ki = 0.01

Physics
  ewfd: ElectromagneticWavesFrequencyDomain on all domains
    dependent variable E = {Ex, Ey, Ez}
    MeshControl.SizeControlParameter = FromStudy
    MeshControl.PhysicsControlledMeshMaximumElementSize = c_const * 0.001s
    MeshControl.PhysicsControlledMeshMaximumFrequency = f1
    MeshControl.ResolveWaveInLossyMedia = 0
    wee1: WaveEquationElectric (default)
    pec1: PerfectElectricConductor (default)
    init1: init "Initial Values 1" (default)
    port1: Port on boundaries 1 | Thetap = theta
    port2: Port on boundaries 4 | Thetap = -theta

Mesh
  mesh1 "Mesh 1" (physics-controlled)

Studies
  std1 "Study 1"
    param: Parametric "Parametric Sweep"
      pname = {lambda1, n, k0}
      plistarr = {lambda1, n, k0}
      punit = {m, , 1/m}
      paramselect = auto
    fdss: FrequencyDomainSourceSweep | punit = THz; plist = f1

Solver configurations
  sol1 "Solution 1" (study std1)
    v1: Variables "Dependent Variables 1"
    s1: Stationary "Stationary Solver 1" | stol = 0.01
      p1: Parametric
        sweeptype = filled
        pname = {freq, PortName}
        plistarr = {f1, 1 2}
        punit = {THz, }
        pcontinuationmode = no
      fc1: FullyCoupled | linsolver = d1
      d1: Direct "Suggested Direct Solver (ewfd)"
  sol2 "Parametric Solutions 1" (study std1)

Datasets
  dset1: Solution | solution = sol1
  dset2: Solution | solution = sol2